<?xml version="1.0" encoding="utf-8"?>
<neuroml xmlns="http://www.neuroml.org/schema/neuroml2" xmlns:xsi="http://www.w3.org/2001/XMLSchema-instance" id="Adex2pop_1comp" xsi:schemaLocation="http://www.neuroml.org/schema/neuroml2  https://raw.githubusercontent.com/NeuroML/NeuroML2/development/Schemas/NeuroML2/NeuroML_v2beta4.xsd">
   <network id="Adex2pop_1comp">
      <population component="pyr_23layer" id="1">
         <instance id="0">
            <location x="17.411730" y="33.848517" z="13.136440"/>
         </instance>
         <instance id="1">
            <location x="57.153483" y="78.461136" z="5.419006"/>
         </instance>
         <instance id="2">
            <location x="105.671286" y="54.786379" z="11.228555"/>
         </instance>
         <instance id="3">
            <location x="163.782869" y="38.474552" z="18.806442"/>
         </instance>
         <instance id="4">
            <location x="217.986724" y="31.369401" z="12.039115"/>
         </instance>
      </population>
      <population component="basket_inter" id="2">
         <instance id="0">
            <location x="18.449885" y="50.752077" z="13.540822"/>
         </instance>
         <instance id="1">
            <location x="79.562293" y="67.954544" z="12.764227"/>
         </instance>
         <instance id="2">
            <location x="104.386294" y="57.956426" z="15.434735"/>
         </instance>
         <instance id="3">
            <location x="163.288784" y="48.881881" z="14.125719"/>
         </instance>
         <instance id="4">
            <location x="213.295690" y="57.795471" z="7.380478"/>
         </instance>
      </population>
      <projection id="0" postsynapticPopulation="1" presynapticPopulation="1" synapse="i_exp">
         <connection id="0" postCellId="../1/2/pyr_23layer" postSegmentId="0" preCellId="../1/0/pyr_23layer"/>
         <connection id="1" postCellId="../1/2/pyr_23layer" postSegmentId="0" preCellId="../1/1/pyr_23layer"/>
         <connection id="2" postCellId="../1/4/pyr_23layer" postSegmentId="0" preCellId="../1/2/pyr_23layer"/>
         <connection id="3" postCellId="../1/4/pyr_23layer" postSegmentId="0" preCellId="../1/3/pyr_23layer"/>
         <connection id="4" postCellId="../1/1/pyr_23layer" postSegmentId="0" preCellId="../1/4/pyr_23layer"/>
      </projection>
      <projection id="1" postsynapticPopulation="2" presynapticPopulation="1" synapse="i_exp">
         <connection id="0" postCellId="../2/6/basket_inter" postSegmentId="0" preCellId="../1/0/pyr_23layer"/>
         <connection id="1" postCellId="../2/7/basket_inter" postSegmentId="0" preCellId="../1/1/pyr_23layer"/>
         <connection id="2" postCellId="../2/5/basket_inter" postSegmentId="0" preCellId="../1/2/pyr_23layer"/>
         <connection id="3" postCellId="../2/6/basket_inter" postSegmentId="0" preCellId="../1/3/pyr_23layer"/>
         <connection id="4" postCellId="../2/8/basket_inter" postSegmentId="0" preCellId="../1/4/pyr_23layer"/>
      </projection>
      <projection id="2" postsynapticPopulation="1" presynapticPopulation="2" synapse="i_exp">
         <connection id="0" postCellId="../1/0/pyr_23layer" postSegmentId="0" preCellId="../2/5/basket_inter"/>
         <connection id="1" postCellId="../1/2/pyr_23layer" postSegmentId="0" preCellId="../2/6/basket_inter"/>
         <connection id="2" postCellId="../1/0/pyr_23layer" postSegmentId="0" preCellId="../2/7/basket_inter"/>
         <connection id="3" postCellId="../1/3/pyr_23layer" postSegmentId="0" preCellId="../2/8/basket_inter"/>
         <connection id="4" postCellId="../1/2/pyr_23layer" postSegmentId="0" preCellId="../2/9/basket_inter"/>
      </projection>
      <projection id="3" postsynapticPopulation="2" presynapticPopulation="2" synapse="i_exp">
         <connection id="0" postCellId="../2/8/basket_inter" postSegmentId="0" preCellId="../2/5/basket_inter"/>
         <connection id="1" postCellId="../2/8/basket_inter" postSegmentId="0" preCellId="../2/6/basket_inter"/>
         <connection id="2" postCellId="../2/8/basket_inter" postSegmentId="0" preCellId="../2/7/basket_inter"/>
         <connection id="3" postCellId="../2/6/basket_inter" postSegmentId="0" preCellId="../2/8/basket_inter"/>
         <connection id="4" postCellId="../2/8/basket_inter" postSegmentId="0" preCellId="../2/9/basket_inter"/>
      </projection>
   </network>
</neuroml>
